# EingangsParameter
z_1 := 3
z_2 := 6
a := 100
λ := 0.97
φ_Ae := 170°
φ_As := 60°
φ_j1 := 1°
r_A# := 1
# Parameter berechnen
i := z_2/z_1
r_1 := a/(1 + i) = 33.3333
e := r_1*λ = 32.3333
r_A := r_A#*e*sqrt(2 - 2*cos(π/(2*z_1))) = 16.737
r_a1 := e - r_A*cos(φ_Ae) = 48.816
r_A2 := 83.3  # rA=self.rA_star * e*sqrt(2-2*cos(pi/(2*self.z1)))
# Funktionen
r_a2 := r_A2
κ(ζ) := z_2/z_1*ζ
ξ(ζ) := (λ*sin(κ(ζ))/(1 - λ*cos(κ(ζ))))
ppc(ζ) := a*[-sin(ζ); cos(ζ)] - e*[-sin(ζ + κ(ζ)); cos(ζ + κ(ζ))] - r_A*[-sin(ζ - ξ(ζ)); cos(ζ - ξ(ζ))]
# fixes KOordinatessytem
ppc(ζ) := a*[-0; 1] - e*[-sin(κ(ζ)); cos(κ(ζ))] - r_A*[-sin(-ξ(ζ)); cos(-ξ(ζ))]
cos(t)*r_A2 == -e*sin(i*ζ) + r_A*sin(-ξ(ζ))
cos(t)*r_A2 == -e*sin(i*ζ) + r_A*sin(-(λ*sin(i*ζ)/(1 - λ*cos(i*ζ))))
t_1 := acos(-e*sin(i*ζ) + r_A*sin(-(λ*sin(i*ζ)/(1 - λ*cos(i*ζ))))/r_A2)  # error: Diese Variable ist nicht definiert. Prüfen Sie, ob die Beschriftung richtig festgelegt ist.
α := sin(acos(-e*sin(i*ζ) + r_A*sin(-(λ*sin(i*ζ)/(1 - λ*cos(i*ζ))))/r_A2))*r_A2 == -e*sin(i*ζ) + r_A*sin(-(λ*sin(i*ζ)/(1 - λ*cos(i*ζ)))) solve, ζ → -0.0129773210908
E2 := sin(acos(-e*sin(i*ζ) + r_A*sin(-(λ*sin(i*ζ)/(1 - λ*cos(i*ζ))))/r_A2))*r_A2 == -e*sin(i*ζ) + r_A*sin(-(λ*sin(i*ζ)/(1 - λ*cos(i*ζ)))) simplify → 83.3*(-0.0403704331126*sin(sin(2.0*ζ)/(cos(2.0*ζ) - 1.03092783505))^2 + 12.9930820081*sin(2.0*ζ)*sin(sin(2.0*ζ)/(cos(2.0*ζ) - 1.03092783505)) + (1.0 - 1045.44444444*sin(2.0*ζ)^2))^0.5 == 16.7369649166*sin(sin(2.0*ζ)/(cos(2.0*ζ) - 1.03092783505)) - 32.3333333333*sin(2.0*ζ)
E := ppc(α)
solve block
    # guess values
    t := 80°
    ζ := 20°
    # constraints
    Kreis(t) == ppc(ζ)  # error: Diese Variable ist nicht definiert. Prüfen Sie, ob die Beschriftung richtig festgelegt ist.
    # solver
    res := find(t)
end solve block
Kreis(t) := [cos(t); sin(t)]*r_A2
# Diagramm
start := -π/(2*z_1)
t := start, start + 0.001 .. π/z_1
t_2 := 0, 0.001 .. 2*π
# [chart]
    Y[1] := ppc(t)[1]
    X[1] := ppc(t)[0]
    Y[2] := sin(t_2)*r_a1 + a
    X[2] := cos(t_2)*r_a1
    Y[3] := E[1]
    X[3] := E[0]
    X[4] := cos(t_2)*r_a2
    Y[4] := sin(t_2)*r_a2
    X[5] := [0; 0]
    Y[5] := [0; a]
